** x=width(20) y=length z=normal
*NODE, NSET=all_nodes
1, 0.00000000, 0.00000000, 0.00000000
2, 10.00000000, 0.00000000, 0.00000000
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*ELEMENT, TYPE=S8R, ELSET=blade
1, 1, 3, 6, 4, 2, 53, 5, 52
2, 4, 6, 9, 7, 5, 55, 8, 54
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*NSET, NSET=fixed_end
1, 2, 3
*NSET, NSET=far_face
49, 50, 51
*ELSET, ELSET=root_el
1
*MATERIAL, NAME=cfrp
*ELASTIC, TYPE=ENGINEERING CONSTANTS
135000., 9000., 9000., 0.30, 0.30, 0.45, 4500., 4500.,
3000.,
*DENSITY
1.6E-9
*ORIENTATION, NAME=ori_p00, SYSTEM=RECTANGULAR
0., 1., 0., -1., 0., 0.
*ORIENTATION, NAME=ori_p90, SYSTEM=RECTANGULAR
1., 0., 0., 0., 1., 0.
*SHELL SECTION, COMPOSITE, ELSET=blade
0.25, , cfrp, ori_p00
0.25, , cfrp, ori_p90
0.25, , cfrp, ori_p90
0.25, , cfrp, ori_p00
*BOUNDARY
fixed_end, 1, 6
** multi-step U-clamp: [90, 100, 110, 120, 130, 140, 150, 160, 170, 180]
*STEP, NLGEOM, INC=8000
*STATIC
0.005, 1.0, 1.E-7, 0.02
*BOUNDARY
49, 1, 1, 0.0000000000
49, 2, 2, -36.3380227632
49, 3, 3, 63.6619772368
50, 1, 1, 0.0000000000
50, 2, 2, -36.3380227632
50, 3, 3, 63.6619772368
51, 1, 1, 0.0000000000
51, 2, 2, -36.3380227632
51, 3, 3, 63.6619772368
*NODE PRINT, NSET=far_face, TOTALS=YES
RF
*END STEP
*STEP, NLGEOM, INC=8000
*STATIC
0.005, 1.0, 1.E-7, 0.02
*BOUNDARY
49, 1, 1, 0.0000000000
49, 2, 2, -43.5746721206
49, 3, 3, 67.2450872135
50, 1, 1, 0.0000000000
50, 2, 2, -43.5746721206
50, 3, 3, 67.2450872135
51, 1, 1, 0.0000000000
51, 2, 2, -43.5746721206
51, 3, 3, 67.2450872135
*NODE PRINT, NSET=far_face, TOTALS=YES
RF
*END STEP
*STEP, NLGEOM, INC=8000
*STATIC
0.005, 1.0, 1.E-7, 0.02
*BOUNDARY
49, 1, 1, 0.0000000000
49, 2, 2, -51.0541625358
49, 3, 3, 69.9019002128
50, 1, 1, 0.0000000000
50, 2, 2, -51.0541625358
50, 3, 3, 69.9019002128
51, 1, 1, 0.0000000000
51, 2, 2, -51.0541625358
51, 3, 3, 69.9019002128
*NODE PRINT, NSET=far_face, TOTALS=YES
RF
*END STEP
*STEP, NLGEOM, INC=8000
*STATIC
0.005, 1.0, 1.E-7, 0.02
*BOUNDARY
49, 1, 1, 0.0000000000
49, 2, 2, -58.6503328434
49, 3, 3, 71.6197243914
50, 1, 1, 0.0000000000
50, 2, 2, -58.6503328434
50, 3, 3, 71.6197243914
51, 1, 1, 0.0000000000
51, 2, 2, -58.6503328434
51, 3, 3, 71.6197243914
*NODE PRINT, NSET=far_face, TOTALS=YES
RF
*END STEP
*STEP, NLGEOM, INC=8000
*STATIC
0.005, 1.0, 1.E-7, 0.02
*BOUNDARY
49, 1, 1, 0.0000000000
49, 2, 2, -66.2376049922
49, 3, 3, 72.4036897472
50, 1, 1, 0.0000000000
50, 2, 2, -66.2376049922
50, 3, 3, 72.4036897472
51, 1, 1, 0.0000000000
51, 2, 2, -66.2376049922
51, 3, 3, 72.4036897472
*NODE PRINT, NSET=far_face, TOTALS=YES
RF
*END STEP
*STEP, NLGEOM, INC=8000
*STATIC
0.005, 1.0, 1.E-7, 0.02
*BOUNDARY
49, 1, 1, 0.0000000000
49, 2, 2, -73.6935591726
49, 3, 3, 72.2763521595
50, 1, 1, 0.0000000000
50, 2, 2, -73.6935591726
50, 3, 3, 72.2763521595
51, 1, 1, 0.0000000000
51, 2, 2, -73.6935591726
51, 3, 3, 72.2763521595
*NODE PRINT, NSET=far_face, TOTALS=YES
RF
*END STEP
*STEP, NLGEOM, INC=8000
*STATIC
0.005, 1.0, 1.E-7, 0.02
*BOUNDARY
49, 1, 1, 0.0000000000
49, 2, 2, -80.9014068290
49, 3, 3, 71.2769200674
50, 1, 1, 0.0000000000
50, 2, 2, -80.9014068290
50, 3, 3, 71.2769200674
51, 1, 1, 0.0000000000
51, 2, 2, -80.9014068290
51, 3, 3, 71.2769200674
*NODE PRINT, NSET=far_face, TOTALS=YES
RF
*END STEP
*STEP, NLGEOM, INC=8000
*STATIC
0.005, 1.0, 1.E-7, 0.02
*BOUNDARY
49, 1, 1, 0.0000000000
49, 2, 2, -87.7523057994
49, 3, 3, 69.4601254523
50, 1, 1, 0.0000000000
50, 2, 2, -87.7523057994
50, 3, 3, 69.4601254523
51, 1, 1, 0.0000000000
51, 2, 2, -87.7523057994
51, 3, 3, 69.4601254523
*NODE PRINT, NSET=far_face, TOTALS=YES
RF
*END STEP
*STEP, NLGEOM, INC=8000
*STATIC
0.005, 1.0, 1.E-7, 0.02
*BOUNDARY
49, 1, 1, 0.0000000000
49, 2, 2, -94.1474660586
49, 3, 3, 66.8947690544
50, 1, 1, 0.0000000000
50, 2, 2, -94.1474660586
50, 3, 3, 66.8947690544
51, 1, 1, 0.0000000000
51, 2, 2, -94.1474660586
51, 3, 3, 66.8947690544
*NODE PRINT, NSET=far_face, TOTALS=YES
RF
*END STEP
*STEP, NLGEOM, INC=8000
*STATIC
0.005, 1.0, 1.E-7, 0.02
*BOUNDARY
49, 1, 1, 0.0000000000
49, 2, 2, -100.0000000000
49, 3, 3, 63.6619772368
50, 1, 1, 0.0000000000
50, 2, 2, -100.0000000000
50, 3, 3, 63.6619772368
51, 1, 1, 0.0000000000
51, 2, 2, -100.0000000000
51, 3, 3, 63.6619772368
*NODE PRINT, NSET=far_face, TOTALS=YES
RF
*END STEP
