** x=width(20) y=length z=normal
*NODE, NSET=all_nodes
1, 0.00000000, 0.00000000, 0.00000000
2, 10.00000000, 0.00000000, 0.00000000
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*ELEMENT, TYPE=S8R, ELSET=blade
1, 1, 3, 6, 4, 2, 53, 5, 52
2, 4, 6, 9, 7, 5, 55, 8, 54
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*NSET, NSET=fixed_end
1, 2, 3
*NSET, NSET=far_face
49, 50, 51
*NSET, NSET=centerline
26, 47, 50
*ELSET, ELSET=root_el
1
*MATERIAL, NAME=cfrp
*ELASTIC, TYPE=ENGINEERING CONSTANTS
135000., 9000., 9000., 0.30, 0.30, 0.45, 4500., 4500.,
3000.,
*DENSITY
1.6E-9
*ORIENTATION, NAME=ori_p00, SYSTEM=RECTANGULAR
0., 1., 0., -1., 0., 0.
*ORIENTATION, NAME=ori_p90, SYSTEM=RECTANGULAR
1., 0., 0., 0., 1., 0.
*SHELL SECTION, COMPOSITE, ELSET=blade
0.25, , cfrp, ori_p00
0.25, , cfrp, ori_p90
0.25, , cfrp, ori_p90
0.25, , cfrp, ori_p00
*BOUNDARY
fixed_end, 1, 6
** tip_force_disp: total Fz=800 N on far_face
*STEP, NLGEOM, INC=5000
*STATIC
0.01, 1.0, 1.E-6, 0.05
*CLOAD
49, 3, 266.6666666667
50, 3, 266.6666666667
51, 3, 266.6666666667
*NODE PRINT, NSET=centerline
U
*NODE PRINT, NSET=far_face, TOTALS=YES
RF
*NODE PRINT, NSET=fixed_end, TOTALS=YES
RF
*END STEP
